# OpenSim document version 30000
ScaleTool SN129_scale:
  mass: 72.84
  height: 1800
  age: 0
  notes: SN129 marker set adaptation of Rajagopal 2016
  GenericModelMaker:
    model_file: Rajagopal_low.osim
  ModelScaler:
    apply: true
    scaling_order: measurements manualScale
    marker_file: weight.trc
    time_range: 5 6
    preserve_mass_distribution: true
    output_model_file: subject_SN129_scaled.osim
    output_scale_file: scaleSet_applied_SN129.xml
    MeasurementSet marker_measurements:
      Measurement pelvis_X: apply=true
        MarkerPair: markers=(R_ASIS R_PSIS)
        MarkerPair: markers=(L_ASIS L_PSIS)
        BodyScale pelvis: axes=X
      Measurement pelvis_Y: apply=true
        MarkerPair: markers=(R_PSIS RHJC)
        MarkerPair: markers=(R_ASIS RHJC)
        MarkerPair: markers=(L_PSIS LHJC)
        MarkerPair: markers=(L_ASIS LHJC)
        BodyScale pelvis: axes=Y
      Measurement pelvis_Z: apply=true
        MarkerPair: markers=(R_PSIS L_PSIS)
        MarkerPair: markers=(R_ASIS L_ASIS)
        BodyScale pelvis: axes=Z
      Measurement thigh: apply=true
        MarkerPair: markers=(RHJC R_lfe)
        MarkerPair: markers=(RHJC R_mfe)
        MarkerPair: markers=(LHJC L_lfe)
        MarkerPair: markers=(LHJC L_mfe)
        BodyScale femur_r: axes=(X Y Z)
        BodyScale femur_l: axes=(X Y Z)
      Measurement shank: apply=true
        MarkerPair: markers=(R_lfe R_lm)
        MarkerPair: markers=(R_mfe R_mm)
        MarkerPair: markers=(L_lfe L_lm)
        MarkerPair: markers=(L_mfe L_mm)
        BodyScale tibia_r: axes=(X Y Z)
        BodyScale tibia_l: axes=(X Y Z)
      Measurement foot: apply=true
        MarkerPair: markers=(R_heel R_instep)
        MarkerPair: markers=(R_heel R_5MT)
        MarkerPair: markers=(L_heel L_instep)
        MarkerPair: markers=(L_heel L_5MT)
        BodyScale talus_r: axes=(X Y Z)
        BodyScale calcn_r: axes=(X Y Z)
        BodyScale toes_r: axes=(X Y Z)
        BodyScale talus_l: axes=(X Y Z)
        BodyScale calcn_l: axes=(X Y Z)
        BodyScale toes_l: axes=(X Y Z)
      Measurement torso: apply=false
        MarkerPair: markers=(R_ASIS L_ASIS)
        BodyScale torso: axes=(X Y Z)
      Measurement humerus: apply=false
        MarkerPair: markers=(R_ASIS L_ASIS)
        BodyScale humerus_r: axes=(X Y Z)
        BodyScale humerus_l: axes=(X Y Z)
      Measurement radius: apply=false
        MarkerPair: markers=(R_ASIS L_ASIS)
        BodyScale ulna_r: axes=(X Y Z)
        BodyScale radius_r: axes=(X Y Z)
        BodyScale hand_r: axes=(X Y Z)
        BodyScale ulna_l: axes=(X Y Z)
        BodyScale radius_l: axes=(X Y Z)
        BodyScale hand_l: axes=(X Y Z)
  MarkerPlacer:
    apply: true
    marker_file: weight.trc
    time_range: 5 6
    output_motion_file: scale_output_SN129.mot
    output_model_file: subject_SN129_scaled.osim
    max_marker_movement: -1
    IKTaskSet scale_ik_SN129:
      IKMarkerTask R_ASIS: apply=true weight=100
      IKMarkerTask L_ASIS: apply=true weight=100
      IKMarkerTask R_PSIS: apply=true weight=50
      IKMarkerTask L_PSIS: apply=true weight=50
      IKMarkerTask R_gt: apply=true weight=100
      IKMarkerTask L_gt: apply=true weight=100
      IKMarkerTask R_th0: apply=true weight=20
      IKMarkerTask R_th1: apply=true weight=20
      IKMarkerTask R_th2: apply=true weight=20
      IKMarkerTask R_th3: apply=true weight=20
      IKMarkerTask L_th0: apply=true weight=20
      IKMarkerTask L_th1: apply=true weight=20
      IKMarkerTask L_th2: apply=true weight=20
      IKMarkerTask L_th3: apply=true weight=20
      IKMarkerTask R_lfe: apply=true weight=50
      IKMarkerTask R_mfe: apply=true weight=50
      IKMarkerTask L_lfe: apply=true weight=50
      IKMarkerTask L_mfe: apply=true weight=50
      IKMarkerTask R_sh0: apply=true weight=20
      IKMarkerTask R_sh1: apply=true weight=20
      IKMarkerTask R_sh2: apply=true weight=20
      IKMarkerTask R_sh3: apply=true weight=20
      IKMarkerTask L_sh0: apply=true weight=20
      IKMarkerTask L_sh1: apply=true weight=20
      IKMarkerTask L_sh2: apply=true weight=20
      IKMarkerTask L_sh3: apply=true weight=20
      IKMarkerTask R_lm: apply=true weight=50
      IKMarkerTask R_mm: apply=true weight=50
      IKMarkerTask L_lm: apply=true weight=50
      IKMarkerTask L_mm: apply=true weight=50
      IKMarkerTask R_heel: apply=true weight=25
      IKMarkerTask R_instep: apply=true weight=25
      IKMarkerTask R_5MT: apply=true weight=25
      IKMarkerTask R_mt2: apply=true weight=15
      IKMarkerTask L_heel: apply=true weight=25
      IKMarkerTask L_instep: apply=true weight=25
      IKMarkerTask L_5MT: apply=true weight=25
      IKMarkerTask L_mt2: apply=true weight=15
