# OpenSim document version 40500
Model compound_pendulum:
  gravity: 0 -9.81 0
  TableReporter__double_ coord_reporter: report_time_interval=0.01 [s]
      input_inputs=(/jointset/pivot_joint/theta|value(theta_rad) /jointset/pivot_joint/theta|speed(dtheta_rad_s))
  StatesTrajectoryReporter states_reporter: report_time_interval=0.01 [s]
  Ground
  BodySet:
    Body pend: mass=7.5 [kg] mass_center=(0 -0.25 0) inertia=(0 0 0.1839375 0 0 0)
      PhysicalOffsetFrame plate_com_frame: socket_parent=.. translation=(0 -0.08333333 0) [meters]
        Cylinder plate_com_frame_geom_1: radius=0.01 half_height=0.08333333
      Sphere pend_geom_1: radius=0.01
  JointSet:
    PinJoint pivot_joint: socket_parent_frame=ground_offset socket_child_frame=pend_offset
      Coordinate theta
      PhysicalOffsetFrame ground_offset: socket_parent=/ground translation=(0 2 0)
      PhysicalOffsetFrame pend_offset: socket_parent=/bodyset/pend translation=(0 0 0)
