# OpenSim document version 40500
Model rod_bob_pendulum:
  gravity: 0 -9.81 0
  TableReporter__double_ coord_reporter: report_time_interval=0.01 [s]
      input_inputs=(/jointset/pivot_joint/theta|value(theta_rad) /jointset/pivot_joint/theta|speed(dtheta_rad_s))
  StatesTrajectoryReporter states_reporter: report_time_interval=0.01 [s]
  Ground
  BodySet:
    Body rod: mass=0.5 [kg] mass_center=(0 -0.5 0) inertia=(0.04168467 0.04168467 3.6e-5 0 0 0)
      PhysicalOffsetFrame rod_geom_frame: socket_parent=.. translation=(0 -0.5 0) [meters]
        Cylinder rod_geom_frame_geom_1: radius=0.012 half_height=0.5
      Sphere rod_geom_1: radius=0.03
    Body bob: mass=1 mass_center=(0 0 0) inertia=(0.00144 0.00144 0.00144 0 0 0)
      Sphere bob_geom_1: radius=0.06
  JointSet:
    PinJoint pivot_joint: socket_parent_frame=ground_offset socket_child_frame=rod_offset
      Coordinate theta
      PhysicalOffsetFrame ground_offset: socket_parent=/ground translation=(0 1 0) orientation=(0 0 1.570796) [radians]
      PhysicalOffsetFrame rod_offset: socket_parent=/bodyset/rod translation=(0 0 0)
    WeldJoint rod_bob_weld: socket_parent_frame=rod_offset socket_child_frame=bob_offset
      PhysicalOffsetFrame rod_offset: socket_parent=/bodyset/rod translation=(0 -1 0)
      PhysicalOffsetFrame bob_offset: socket_parent=/bodyset/bob translation=(0 0 0)
