# OpenSim document version 40500
Model float_thigh:
  Ground
  BodySet:
    Body thigh: mass=1 [kg] mass_center=(0 0 0) inertia=(0.02663082 0.02663082 0.02663082 0 0 0)
      PhysicalOffsetFrame thigh: socket_parent=.. translation=(0 0 0) [meters]
        Cylinder thigh_geom_1: scale_factors=(0.4474726 0.4474726 0.4474726) radius=0.025 half_height=0.5
  JointSet:
    CustomJoint hip: socket_parent_frame=ground_offset socket_child_frame=thigh_offset
      Coordinate hip_flex
      Coordinate tx
      Coordinate ty
      Coordinate tz
      PhysicalOffsetFrame ground_offset: socket_parent=/ground translation=(0 3 0)
      PhysicalOffsetFrame thigh_offset: socket_parent=/bodyset/thigh translation=(0 0.2237363 0)
        Sphere thigh_offset_geom_1: scale_factors=(0.4474726 0.4474726 0.4474726) radius=0.05
      SpatialTransform: axes_held_at_zero=(rotation2 rotation3)
        TransformAxis rotation1: coordinates=hip_flex axis=(0 0 1) LinearFunction(coefficients=1 0)
        TransformAxis translation1: coordinates=tx axis=(1 0 0) LinearFunction(coefficients=1 0)
        TransformAxis translation2: coordinates=ty axis=(0 1 0) LinearFunction(coefficients=1 0)
        TransformAxis translation3: coordinates=tz axis=(0 0 1) LinearFunction(coefficients=1 0)
  MarkerSet:
    Marker gt: thigh (0 0.2013627 0.08949452)
    Marker lfe: thigh (0.004474726 -0.2013627 0.04474726)
