# OpenSim document version 40500
Model SN129_sev_seg_hara:
  Ground
  BodySet:
    Body pelvis: mass=11.8 [kg] mass_center=(0 0 0) inertia=(0.1028 0.0871 0.0579 0 0 0)
      PhysicalOffsetFrame pelv_off: socket_parent=.. translation=(-0.04946341 -0.08385946 0.0002302659) [meters]
          orientation=(1.570796 0 0) [radians]
        Cylinder pelv_off_geom_1: radius=0.01 half_height=0.09076762
    Body L_thigh: mass=9.3 mass_center=(0 -0.2382479 0) inertia=(0.133 0.133 0.133 0 0 0)
      PhysicalOffsetFrame th_hip_L: socket_parent=.. translation=(0 -0.2382479 0)
        Cylinder th_hip_L_geom_1: radius=0.01 half_height=0.2382479
    Body L_shank: mass=3.7 mass_center=(0 -0.2106685 0) inertia=(0.133 0.133 0.133 0 0 0)
      PhysicalOffsetFrame shank_off_L: socket_parent=.. translation=(0 0.2106685 0)
        Cylinder shank_off_L_geom_1: radius=0.01 half_height=0.2106685
    Body L_foot: mass=1.3 mass_center=(-0.07268537 -0.03 0) inertia=(0.133 0.133 0.133 0 0 0)
      PhysicalOffsetFrame foot_off: socket_parent=.. translation=(0.07268537 0 0) orientation=(0 0 -1.570796)
        Cylinder foot_off_geom_1: radius=0.01 half_height=0.07268537
    Body R_thigh: mass=9.3 mass_center=(0 -0.2315621 0) inertia=(0.133 0.133 0.133 0 0 0)
      PhysicalOffsetFrame th_hip_R: socket_parent=.. translation=(0 -0.2315621 0)
        Cylinder th_hip_R_geom_1: radius=0.01 half_height=0.2315621
    Body R_shank: mass=3.7 mass_center=(0 -0.2177553 0) inertia=(0.133 0.133 0.133 0 0 0)
      PhysicalOffsetFrame shank_off_R: socket_parent=.. translation=(0 0.2177553 0)
        Cylinder shank_off_R_geom_1: radius=0.01 half_height=0.2177553
    Body R_foot: mass=1.3 mass_center=(-0.07088875 -0.03 0) inertia=(0.133 0.133 0.133 0 0 0)
      PhysicalOffsetFrame foot_off: socket_parent=.. translation=(0.07088875 0 0) orientation=(0 0 -1.570796)
        Cylinder foot_off_geom_1: radius=0.01 half_height=0.07088875
  JointSet:
    FreeJoint pj: socket_parent_frame=ground_offset socket_child_frame=pelvis_offset
      Coordinate pelv_list: default_value=0.001762496
      Coordinate pelv_rot: default_value=-0.05272902
      Coordinate pelv_tilt: default_value=-0.1880966
      Coordinate tx: default_value=-0.1933451
      Coordinate ty: default_value=1.05633
      Coordinate tz: default_value=-0.1832335
      PhysicalOffsetFrame ground_offset: socket_parent=/ground translation=(0 0 0)
      PhysicalOffsetFrame pelvis_offset: socket_parent=/bodyset/pelvis translation=(0 0 0)
    CustomJoint L_hip: socket_parent_frame=pelvis_offset socket_child_frame=L_thigh_offset
      Coordinate hip_flex_L: default_value=0.1771215
      Coordinate hip_add_L: default_value=0.01291745
      Coordinate hip_rot_L: default_value=0.195225
      PhysicalOffsetFrame pelvis_offset: socket_parent=/bodyset/pelvis
          translation=(-0.04946341 -0.08385946 -0.09053736)
      PhysicalOffsetFrame L_thigh_offset: socket_parent=/bodyset/L_thigh translation=(0 0 0)
        Sphere L_thigh_offset_geom_1: radius=0.03
      SpatialTransform:
        TransformAxis rotation1: coordinates=hip_flex_L axis=(0 0 1) LinearFunction(coefficients=1 0)
        TransformAxis rotation2: coordinates=hip_add_L axis=(1 0 0) LinearFunction(coefficients=1 0)
        TransformAxis rotation3: coordinates=hip_rot_L axis=(0 1 0) LinearFunction(coefficients=1 0)
        TransformAxis translation1: axis=(1 0 0)
        TransformAxis translation2: axis=(0 1 0)
        TransformAxis translation3: axis=(0 0 1)
    PinJoint L_knee: socket_parent_frame=L_thigh_offset socket_child_frame=L_shank_offset
      Coordinate knee_ext_L: default_value=-0.236589
      PhysicalOffsetFrame L_thigh_offset: socket_parent=/bodyset/L_thigh translation=(-0.01 -0.4764959 0)
      PhysicalOffsetFrame L_shank_offset: socket_parent=/bodyset/L_shank translation=(-0.01 0.421337 0)
        Sphere L_shank_offset_geom_1: radius=0.03
    PinJoint L_ankle: socket_parent_frame=L_shank_offset socket_child_frame=L_foot_offset
      Coordinate ankle_flex_L: default_value=-0.08116932
      PhysicalOffsetFrame L_shank_offset: socket_parent=/bodyset/L_shank translation=(-0.01 0 0)
      PhysicalOffsetFrame L_foot_offset: socket_parent=/bodyset/L_foot translation=(0 0 0)
        Sphere L_foot_offset_geom_1: radius=0.03
    CustomJoint R_hip: socket_parent_frame=pelvis_offset socket_child_frame=R_thigh_offset
      Coordinate hip_flex_R: default_value=0.09787156
      Coordinate hip_add_R: default_value=0.02658966
      Coordinate hip_rot_R: default_value=0.01486392
      PhysicalOffsetFrame pelvis_offset: socket_parent=/bodyset/pelvis translation=(-0.0498002 -0.08427644 0.0909971)
      PhysicalOffsetFrame R_thigh_offset: socket_parent=/bodyset/R_thigh translation=(0 0 0)
        Sphere R_thigh_offset_geom_1: radius=0.03
      SpatialTransform:
        TransformAxis rotation1: coordinates=hip_flex_R axis=(0 0 1) LinearFunction(coefficients=1 0)
        TransformAxis rotation2: coordinates=hip_add_R axis=(1 0 0) LinearFunction(coefficients=1 0)
        TransformAxis rotation3: coordinates=hip_rot_R axis=(0 1 0) LinearFunction(coefficients=1 0)
        TransformAxis translation1: axis=(1 0 0)
        TransformAxis translation2: axis=(0 1 0)
        TransformAxis translation3: axis=(0 0 1)
    PinJoint R_knee: socket_parent_frame=R_thigh_offset socket_child_frame=R_shank_offset
      Coordinate knee_ext_R: default_value=-0.06247503
      PhysicalOffsetFrame R_thigh_offset: socket_parent=/bodyset/R_thigh translation=(-0.01 -0.4631243 0)
      PhysicalOffsetFrame R_shank_offset: socket_parent=/bodyset/R_shank translation=(-0.01 0.4355106 0)
        Sphere R_shank_offset_geom_1: radius=0.03
    PinJoint R_ankle: socket_parent_frame=R_shank_offset socket_child_frame=R_foot_offset
      Coordinate ankle_flex_R: default_value=-0.1078822
      PhysicalOffsetFrame R_shank_offset: socket_parent=/bodyset/R_shank translation=(-0.01 0 0)
      PhysicalOffsetFrame R_foot_offset: socket_parent=/bodyset/R_foot translation=(0 0 0)
        Sphere R_foot_offset_geom_1: radius=0.03
  MarkerSet:
    Marker R_ASIS: pelvis (-0.006304984 -0.001956198 0.1401037)
    Marker L_ASIS: pelvis (-0.01002721 -0.001536828 -0.1398626)
    Marker R_PSIS: pelvis (-0.1829818 -0.0006389217 0.05873404)
    Marker L_PSIS: pelvis (-0.183623 0.001743422 -0.06775644)
    Marker L_gt: L_thigh (-0.02277141 -0.03020658 -0.09536059)
    Marker L_lfe: L_thigh (-0.01306618 -0.4603778 -0.06292836)
    Marker L_mfe: L_thigh (-0.03712022 -0.4756696 0.02966894)
    Marker L_th0: L_thigh (-0.06874922 -0.1689607 -0.100514)
    Marker L_th1: L_thigh (0.01921894 -0.1647611 -0.1137242)
    Marker L_th2: L_thigh (0.02835152 -0.3138808 -0.1006612)
    Marker L_th3: L_thigh (-0.05938865 -0.3176264 -0.08776253)
    Marker L_lm: L_shank (-0.003493955 -0.008633034 -0.02705241)
    Marker L_mm: L_shank (0.003233141 0.02090821 0.03838326)
    Marker L_sh0: L_shank (-0.1033185 0.285258 -0.09165649)
    Marker L_sh1: L_shank (-0.01759899 0.2873267 -0.1184639)
    Marker L_sh2: L_shank (-0.001562989 0.1436284 -0.07858343)
    Marker L_sh3: L_shank (-0.08650559 0.1419026 -0.05140464)
    Marker L_5MT: L_foot (0.1289027 -0.03110311 -0.05969692)
    Marker L_instep: L_foot (0.08792433 -0.006323939 0.05341439)
    Marker L_heel: L_foot (-0.0460452 -0.06243845 -0.01320232)
    Marker L_mt2: L_foot (0.1540329 0.0009359064 0.01526597)
    Marker R_gt: R_thigh (-0.02861231 -0.04584728 0.07453029)
    Marker R_lfe: R_thigh (0.008357586 -0.4490976 0.05928444)
    Marker R_mfe: R_thigh (0.03007895 -0.4592509 -0.04052434)
    Marker R_th0: R_thigh (-0.05590958 -0.3060007 0.07498587)
    Marker R_th1: R_thigh (0.02860786 -0.2990165 0.1047563)
    Marker R_th2: R_thigh (0.01660166 -0.1485694 0.1063094)
    Marker R_th3: R_thigh (-0.0680456 -0.1559238 0.07646555)
    Marker R_lm: R_shank (-0.004695098 0.001350279 0.03435758)
    Marker R_mm: R_shank (0.0125834 0.02050514 -0.0382078)
    Marker R_sh0: R_shank (-0.0674959 0.1266576 0.06168716)
    Marker R_sh1: R_shank (0.001104311 0.1257954 0.0781399)
    Marker R_sh2: R_shank (-0.003757247 0.2579823 0.1023528)
    Marker R_sh3: R_shank (-0.07407257 0.2579529 0.08563952)
    Marker R_5MT: R_foot (0.1233889 -0.03089748 0.07859716)
    Marker R_instep: R_foot (0.1007676 -0.002092804 -0.03374253)
    Marker R_heel: R_foot (-0.05079335 -0.05718489 0.007606206)
    Marker R_mt2: R_foot (0.1518501 -0.007616647 0.01664708)
