# OpenSim document version 40500
Model 3_seg_2d:
  TableReporter__double_ reporter: report_time_interval=0.005 [s]
      input_inputs=(/jointset/hip/hip_flex|value(hip_flex) /jointset/hip/tx|value(tx) /jointset/hip/ty|value(ty) /jointset/hip/tz|value(tz) /jointset/knee/knee_ext|value(knee_ext) /jointset/ankle/ankle_flex|value(ankle_flex))
  Ground
  BodySet:
    Body thigh: mass=6.503497 [kg] mass_center=(0 -0.2178422 0) inertia=(0.1000831 0.1000831 0.1000831 0 0 0)
      PhysicalOffsetFrame th_hip: socket_parent=.. translation=(0 -0.2178422 0) [meters]
        Cylinder th_hip_geom_1: scale_factors=(1.037344 1.037344 1.037344) radius=0.025 half_height=0.21
    Body shank: mass=2.587413 mass_center=(0 0.2250277 0) inertia=(0.1238564 0.1238564 0.1238564 0 0 0)
      PhysicalOffsetFrame shank_off: socket_parent=.. translation=(0 0.2250277 0)
        Cylinder shank_off_geom_1: scale_factors=(1.153988 1.153988 1.153988) radius=0.025 half_height=0.195
    Body foot: mass=0.9090909 mass_center=(0.1607565 -0.04822695 0) inertia=(0.2403547 0.2403547 0.2403547 0 0 0)
      PhysicalOffsetFrame foot_off: socket_parent=.. translation=(0 -0.1607565 0)
        Cylinder foot_off_geom_1: scale_factors=(1.607565 1.607565 1.607565) radius=0.02 half_height=0.1
  JointSet:
    CustomJoint hip: socket_parent_frame=ground_offset socket_child_frame=thigh_offset
      Coordinate hip_flex
      Coordinate tx
      Coordinate ty
      Coordinate tz
      PhysicalOffsetFrame ground_offset: socket_parent=/ground translation=(0 3 0)
      PhysicalOffsetFrame thigh_offset: socket_parent=/bodyset/thigh translation=(0 0 0)
        Sphere thigh_offset_geom_1: scale_factors=(1.037344 1.037344 1.037344) radius=0.05
      SpatialTransform: axes_held_at_zero=(rotation2 rotation3)
        TransformAxis rotation1: coordinates=hip_flex axis=(0 0 1) LinearFunction(coefficients=1 0)
        TransformAxis translation1: coordinates=tx axis=(1 0 0) LinearFunction(coefficients=1 0)
        TransformAxis translation2: coordinates=ty axis=(0 1 0) LinearFunction(coefficients=1 0)
        TransformAxis translation3: coordinates=tz axis=(0 0 1) LinearFunction(coefficients=1 0)
    PinJoint knee: socket_parent_frame=thigh_offset socket_child_frame=shank_offset
      Coordinate knee_ext
      PhysicalOffsetFrame thigh_offset: socket_parent=/bodyset/thigh translation=(-0.01037344 -0.4356843 0)
      PhysicalOffsetFrame shank_offset: socket_parent=/bodyset/shank translation=(-0.01153988 0.4500555 0)
        Sphere shank_offset_geom_1: scale_factors=(1.153988 1.153988 1.153988) radius=0.05
    PinJoint ankle: socket_parent_frame=shank_offset socket_child_frame=foot_offset
      Coordinate ankle_flex: default_value=0.7853982
      PhysicalOffsetFrame shank_offset: socket_parent=/bodyset/shank translation=(-0.01153988 0 0)
      PhysicalOffsetFrame foot_offset: socket_parent=/bodyset/foot translation=(0 0 0)
        Sphere foot_offset_geom_1: scale_factors=(1.607565 1.607565 1.607565) radius=0.05
  MarkerSet:
    Marker gt: thigh (-0.01037344 -0.03112031 0.07261405)
    Marker lfe: thigh (0 -0.4356843 0.05186718)
    Marker mfe: thigh (0 -0.4356843 -0.05186718)
    Marker lm: shank (-0.01153988 0 0.05769942)
    Marker mm: shank (0.01153988 0 -0.04615953)
    Marker toe: foot (0.01607565 -0.1286052 0.0643026)
    Marker instep: foot (0.0321513 0 -0.04822695)
