# OpenSim document version 40500
Model:
  TableReporter__double_ reporter: report_time_interval=0.005 [s]
      input_inputs=(/jointset/hip/hip_coord_0|value(hip_coord_0) /jointset/hip/hip_coord_1|value(hip_coord_1) /jointset/hip/hip_coord_2|value(hip_coord_2) /jointset/hip/hip_coord_3|value(hip_coord_3) /jointset/hip/hip_coord_4|value(hip_coord_4) /jointset/hip/hip_coord_5|value(hip_coord_5) /jointset/knee/knee_coord_0|value(knee_coord_0) /jointset/ankle/ankle_coord_0|value(ankle_coord_0))
  Ground
  BodySet:
    Body thigh: mass=1 [kg] mass_center=(0 0 0) inertia=(0.133 0.133 0.133 0 0 0)
      PhysicalOffsetFrame th_hip: socket_parent=.. translation=(0 0 0) [meters]
        Cylinder th_hip_geom_1: radius=0.025 half_height=0.5
    Body shank: mass=1 mass_center=(0 0 0) inertia=(0.133 0.133 0.133 0 0 0)
      PhysicalOffsetFrame shank_off: socket_parent=.. translation=(0 0 0)
        Cylinder shank_off_geom_1: radius=0.025 half_height=0.5
    Body foot: mass=1 mass_center=(0 0 0) inertia=(0.133 0.133 0.133 0 0 0)
      PhysicalOffsetFrame foot_off: socket_parent=.. translation=(0 0 0)
        Cylinder foot_off_geom_1: radius=0.02 half_height=0.2
  JointSet:
    FreeJoint hip: socket_parent_frame=ground_offset socket_child_frame=thigh_offset
      Coordinate hip_coord_0
      Coordinate hip_coord_1
      Coordinate hip_coord_2
      Coordinate hip_coord_3
      Coordinate hip_coord_4: default_value=6
      Coordinate hip_coord_5
      PhysicalOffsetFrame ground_offset: socket_parent=/ground translation=(0 0 0)
      PhysicalOffsetFrame thigh_offset: socket_parent=/bodyset/thigh translation=(0 0.5 0)
        Sphere thigh_offset_geom_1: radius=0.05
    PinJoint knee: socket_parent_frame=thigh_offset socket_child_frame=shank_offset
      Coordinate knee_coord_0
      PhysicalOffsetFrame thigh_offset: socket_parent=/bodyset/thigh translation=(0 -0.5 0)
      PhysicalOffsetFrame shank_offset: socket_parent=/bodyset/shank translation=(0 0.5 0)
        Sphere shank_offset_geom_1: radius=0.05
    PinJoint ankle: socket_parent_frame=shank_offset socket_child_frame=foot_offset
      Coordinate ankle_coord_0: default_value=0.7853982
      PhysicalOffsetFrame shank_offset: socket_parent=/bodyset/shank translation=(0 -0.5 0)
      PhysicalOffsetFrame foot_offset: socket_parent=/bodyset/foot translation=(0 0.2 0)
        Sphere foot_offset_geom_1: radius=0.05
