# OpenSim document version 40500
Model 3_seg_2d:
  Ground
  BodySet:
    Body thigh: mass=9.3 [kg] mass_center=(0 -0.2042243 0) inertia=(0.133 0.133 0.133 0 0 0)
      PhysicalOffsetFrame th_hip: socket_parent=.. translation=(0 -0.2042243 0) [meters]
        Cylinder th_hip_geom_1: radius=0.01 half_height=0.2042243
    Body shank: mass=3.7 mass_center=(0 0.1980736 0) inertia=(0.133 0.133 0.133 0 0 0)
      PhysicalOffsetFrame shank_off: socket_parent=.. translation=(0 0.1980736 0)
        Cylinder shank_off_geom_1: radius=0.01 half_height=0.1980736
    Body foot: mass=1.3 mass_center=(0.08938248 -0.03 0) inertia=(0.133 0.133 0.133 0 0 0)
      PhysicalOffsetFrame foot_off: socket_parent=.. translation=(0.08938248 0 0) orientation=(0 0 -1.570796) [radians]
        Cylinder foot_off_geom_1: radius=0.01 half_height=0.08938248
  JointSet:
    CustomJoint hip: socket_parent_frame=ground_offset socket_child_frame=thigh_offset
      Coordinate hip_flex: default_value=-0.07004187
      Coordinate tx: default_value=-0.3601762
      Coordinate ty: default_value=0.8889135
      Coordinate tz: default_value=-0.1296813
      PhysicalOffsetFrame ground_offset: socket_parent=/ground translation=(0 0 0)
      PhysicalOffsetFrame thigh_offset: socket_parent=/bodyset/thigh translation=(0 0 0)
        Sphere thigh_offset_geom_1: radius=0.03
      SpatialTransform: axes_held_at_zero=(rotation2 rotation3)
        TransformAxis rotation1: coordinates=hip_flex axis=(0 0 1) LinearFunction(coefficients=1 0)
        TransformAxis translation1: coordinates=tx axis=(1 0 0) LinearFunction(coefficients=1 0)
        TransformAxis translation2: coordinates=ty axis=(0 1 0) LinearFunction(coefficients=1 0)
        TransformAxis translation3: coordinates=tz axis=(0 0 1) LinearFunction(coefficients=1 0)
    PinJoint knee: socket_parent_frame=thigh_offset socket_child_frame=shank_offset
      Coordinate knee_ext: default_value=-0.09320075
      PhysicalOffsetFrame thigh_offset: socket_parent=/bodyset/thigh translation=(-0.01 -0.4084486 0)
      PhysicalOffsetFrame shank_offset: socket_parent=/bodyset/shank translation=(-0.01 0.3961473 0)
        Sphere shank_offset_geom_1: radius=0.03
    PinJoint ankle: socket_parent_frame=shank_offset socket_child_frame=foot_offset
      Coordinate ankle_flex: default_value=-0.1745433
      PhysicalOffsetFrame shank_offset: socket_parent=/bodyset/shank translation=(-0.01 0 0)
      PhysicalOffsetFrame foot_offset: socket_parent=/bodyset/foot translation=(0 0 0)
        Sphere foot_offset_geom_1: radius=0.03
  MarkerSet:
    Marker gt: thigh (-0.02635313 -0.05033853 0.07832407)
    Marker lfe: thigh (0.009345523 -0.4043157 0.03375838)
    Marker mfe: thigh (-0.0006773598 -0.4121201 -0.05405882)
    Marker lm: shank (0.01919857 -0.0004533114 0.01282143)
    Marker mm: shank (0.001191401 0.004101149 -0.04765308)
    Marker toe: foot (0.1482061 -0.0220958 0.04431268)
    Marker instep: foot (0.09096675 0.02106798 -0.05933687)
    Marker heel: foot (-0.01478049 -0.06194556 -0.01171083)
    Marker 2mt: foot (0.1981966 0.008548775 -0.02085765)
