# OpenSim document version 40500
Model:
  TableReporter__Vec3_ reporter: report_time_interval=0.005 [s]
      input_inputs=(/markerset/gt|location(gt) /markerset/lfe|location(lfe))
  TableReporter__double_ reporter_0: report_time_interval=0.005 [s]
      input_inputs=/jointset/hip/hip_coord_0|value(thigh_ang)
  Ground
  BodySet:
    Body thigh: mass=1 [kg] mass_center=(0 0 0) inertia=(0 0 0 0 0 0)
      PhysicalOffsetFrame th_hip: socket_parent=.. translation=(0 0 0) [meters]
        Cylinder th_hip_geom_1: radius=0.025 half_height=0.5
    Body shank: mass=1 mass_center=(0 0 0) inertia=(0 0 0 0 0 0)
      PhysicalOffsetFrame sh_g: socket_parent=.. translation=(0 0 0)
        Cylinder sh_g_geom_1: radius=0.025 half_height=0.5
  JointSet:
    PinJoint hip: socket_parent_frame=ground_offset socket_child_frame=thigh_offset
      Coordinate hip_coord_0: default_value=0.5235988
      PhysicalOffsetFrame ground_offset: socket_parent=/ground translation=(0 3 0)
      PhysicalOffsetFrame thigh_offset: socket_parent=/bodyset/thigh translation=(0 0.5 0)
        Sphere thigh_offset_geom_1: radius=0.05
    PinJoint knee: socket_parent_frame=thigh_offset socket_child_frame=shank_offset
      Coordinate knee_coord_0: default_value=0.08726646
      PhysicalOffsetFrame thigh_offset: socket_parent=/bodyset/thigh translation=(0 -0.5 0)
      PhysicalOffsetFrame shank_offset: socket_parent=/bodyset/shank translation=(0 0.5 0)
        Sphere shank_offset_geom_1: radius=0.05
  MarkerSet:
    Marker gt: thigh (0 0.45 0.2)
    Marker lfe: thigh (0 -0.45 0.1)
    Marker lm: shank (0 -0.45 0.1)
